# Вариант 30
# Двигатель  2ПН200L:
ndn := 800  # Геометрические параметры вала
l1 := 0.42
l2 := 0.12
l3 := 0.12
ω_d := ndn*2*π/60
γ1 := 10
γ2 := 40
ω_I := ω_d = 83.7758
ω_III := 15
z1 := 24
z2' := 28
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M_пmax := 1225
E_пр := 2*10^11
σ_ив := 4*10^7
σ_k3 := 10^9
σ_смIII := 1.8*10^8
σ_из := 2*10^8
α := 20*deg
τ_срIII := 1.2*10^8
ψ := 0.3
η_3 := 0.97
η_II := 0.99
# 1. Определение мощности на валах редуктора
N_III := M_пmax*ω_III
N_II := N_III/(η_3*η_II)
N_I := N_II/(η_3*η_II)
# 2. Кинематический расчет передаточного механизма(редуктора)
# a) Передаточное число редуктора
u_I_III := |ω_I/ω_III| = 5.58505
# в) Разбить общее передаточное число на частные передаточные числа отдельных передач
u_1_2 := sqrt(u_I_III) = 2.36327
u_2'_3 := sqrt(u_I_III) = 2.36327
# г) Определить недостающие числа зубьев и округлить их до ближайших целых чисел
z2 := z1*u_1_2
z2 = 56.7185
z3 := z2'*u_2'_3
z3 = 66.1716
z2 := 57
z3 := 66
# д) Определить уточненные передаточные числа
u12y := z2/z1 = 2.375
u2'3y := z3/z2' = 2.35714
# е) Определить уточненные угловые скорости
ω_I := ω_d = 83.7758
ω_IIy := ω_I/u12y = 35.274
ω_IIIy := ω_I/(u12y*u2'3y) = 14.9647
# ж) Оценить ошибку по ωIII
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Δω_III := (ω_IIIy - ω_III)/ω_III*100 = -0.235087
# 3. Определение геометрических размеров редуктора
# а) Определить межосевые расстояния из условия прочности зубьев
a12р := u12y^3*sqrt((0.418/(u12y*σ_k3))^2*2*N_II*E_пр/(ω_IIy*ψ*sin(2*α))) = 0.07909
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a2'3р := u2'3y^3*sqrt((0.418/(u2'3y*σ_k3))^2*2*N_III*E_пр/(ω_IIIy*ψ*sin(2*α))) = 0.11721
# б) Найти расчетные модули зубьев
m1р := 2*a12р/(z1 + z2) = 0.00195284
m2р := 2*a2'3р/(z2' + z3) = 0.00249382
# в) Расчетные модули округлить до ближайшего стандартного значения
m1 := 2/1000 = 0.002
m2 := 2.5/1000 = 0.0025
# г) Уточнить межосевые расстояния
a12 := m1*(z1 + z2)/2 = 0.081
a2'3 := m2*(z2' + z3)/2 = 0.1175
# д) Определить толщины зубчатых венцов
b1 := ψ*a12 = 0.0243
b2 := ψ*a2'3 = 0.03525
# e) Определить радиусы делительных окружностей
r1 := m1*z1/2 = 0.024
r2 := m1*z2/2 = 0.057
r2' := m2*z2'/2 = 0.035
r3 := m2*z3/2 = 0.0825
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# 4. Расчет усилий, действующих на зубья колес промежуточного редуктора
# б) Определить окружные силы, действующие на промежуточный вал
Fτ12 := N_II/(r2*ω_IIy)
Fτ32' := N_II/(r2'*ω_IIy)
# б) Определить радиальные силы, действующие на промежуточный вал
Fr12 := Fτ12*tan(α)
Fr32' := Fτ32'*tan(α)
# в) Определить нормальные силы, действующие на промежуточный вал
Fn12 := sqrt(Fτ12^2 + Fr12^2)
Fn32' := sqrt(Fτ32'^2 + Fr32'^2)
# 5. Проверка зубьев на изгибную прочность по формулам
σи1 := Fn12*3.96/(b1*m1) = 825208461
σи2 := Fn12*3.73/(b1*m1) = 777279687
σи2' := Fn32'*3.85/(b2*m2) = 720565005
σи3 := Fn32'*3.73/(b2*m2) = 698105836
# 6. Определение внешних усилий действующих на промежуточный вал
# а) Вычислить проекции сил, действующих на зубья колес, на оси xO2y
Fτ12x := Fτ12*cos(10 deg)
Fτ12y := Fτ12*sin(10 deg)
Fτ32'x := Fτ32'*cos(40 deg)
Fτ32'y := Fτ32'*sin(40 deg)
Fr12x := Fr12*cos(280 deg)
Fr12y := Fr12*sin(280 deg)
Fr32'x := Fr32'*cos(130 deg)
Fr32'y := Fr32'*sin(130 deg)
Fn12x := Fn12*cos(350 deg)
Fn12y := Fn12*sin(350 deg)
Fn32'x := Fn32'*cos(60 deg)
Fn32'y := Fn32'*sin(60 deg)
# Проверка:
F12x := Fτ12x + Fr12x = 9973.7
Fn12x = 9973.7
F12y := Fτ12y + Fr12y = -1758.63
Fn12y = -1758.63
F32'x := Fτ32'x + Fr32'x = 8246.73
Fn32'x = 8246.73
F32'y := Fτ32'y + Fr32'y = 14283.7
Fn32'y = 14283.7
# б) Определить крутящий момент, который возникает при приведении полученных выше сил к оси вала
Mкр := Fτ12*r2 = 542.457
Mкр := Fτ32'*r2' = 542.457
# в) В горизонатальной и вертикальной плоскостях из уравнений статики определить опорные реакции
RAx := (-F12x*(l1 + l2 + l3) - F32'x*l3)/(l1 + l3)
RAy := (-F12y*(l1 + l2 + l3) - F32'y*l3)/(l1 + l3)
RBx := -(F12x + F32'x + RAx)
RBy := -(F12y + F32'y + RAy)
# 7. Определение внутренних усилий и построение эпюр
Φ(x) :=
    1 if x ≥ 0
    0 otherwise
# а) По соответствующим зависимостям в горизонтальной и вертикальной плоскости  построить эпюры поперечных сил и изгибающих моментов
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z := 0, 0.01 .. (l2 + l1 + l3)
Mx(z) := F12x*z*Φ(z) + RAx*(z - l2)*Φ(z - l2) + F32'x*(z - (l2 + l1))*Φ(z - (l2 + l1))
My(z) := F12y*z*Φ(z) + RAy*(z - l2)*Φ(z - l2) + F32'y*(z - (l2 + l1))*Φ(z - (l2 + l1))
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# б) Определить суммарный изгибающий момент путем геометрического сложения горизонтальной и вертикальной составляющих момента
Mи(z) := sqrt(Mx(z)^2 + My(z)^2)
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# в) Построить эпюру крутящего момента
Mкр(z) := Mкр*Φ(z) - Mкр*Φ(z - (l2 + l1))
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# г) Для каждого сечения определить эквивалентный момент путем геометрического сложения соответствующих изгибающего и крутящего моментов и построить эпюру Mэкв
Mэкв(z) := sqrt(Mкр(z)^2 + Mи(z)^2)
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# 8. Подбор сечения промежуточного вала по условию прочности, соответствующему состоянию предельной упругости:
# а) Определить диаметр вала
d(z) := nthroot(32*Mэкв(z)/(π*σ_ив), 3)
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# б) Построить теоретический профиль вала
# в) Определить диаметр опасного сечения вала
z1 := 0.5
zmax := Maximize(d, z1) = 0.54
dоп := d(zmax) = 0.0736064
dст := 0.12
# 80,90,95,100,110 не подошли
# 9. Определение упругих деформаций промежуточного вала
# а) Определить осевые моменты инерции поперечных сечений вала
Jx := π*dст^4/64 = 1.01788e-5
Jy := π*dст^4/64 = 1.01788e-5
# б) В горизонтальной и вертикальной плоскостях построить эпюры углов поворота поперечных сечений и прогибов вала и проверить выполнение условий жесткости
θx(z) := (F12x*z^2 + RAx*Φ(z - l2)*(z - l2)^2 + F32'x*Φ(z - l1 - l2)*(z - l1 - l2)^2 + Cx)/(2*E_пр*Jx)  # error: This variable is undefined.
θy(z) := (F12y*z^2 + RAy*Φ(z - l2)*(z - l2)^2 + F32'y*Φ(z - l1 - l2)*(z - l1 - l2)^2 + Cy)/(2*E_пр*Jy)  # error: This variable is undefined.
wx(z) := (F12x*z^3 + RAx*Φ(z - l2)*(z - l2)^3 + F32'x*Φ(z - l1 - l2)*(z - l1 - l2)^3 + Dx + Cx*z)/(6*E_пр*Jx)  # error: This variable is undefined.
wy(z) := (F12y*z^3 + RAy*Φ(z - l2)*(z - l2)^3 + F32'y*Φ(z - l1 - l2)*(z - l1 - l2)^3 + Dy + Cy*z)/(6*E_пр*Jy)  # error: This variable is undefined.
wx(l2) simplify → 9.8243792032e-9*Cx + 8.18698266934e-8*Dx + 1.41098963649e-6
wx(l2 + l1 + l3) simplify → 5.40340856176e-8*Cx + 8.18698266934e-8*Dx + 5.51459730294e-5
Cx := 1
Dx := 1
Given
9.8243792032e-9*Cx + 8.18698266934e-8*Dx + 1.41098963649e-6 == 0
5.40340856176e-8*Cx + 8.18698266934e-8*Dx + 5.51459730294e-5 == 0
[Cx; Dx] := Find(Cx, Dx)
Cx = -1215.46
Dx = 128.62
wy(l2) simplify → 9.8243792032e-9*Cy + 8.18698266934e-8*Dy - 2.48795542412e-7
wy(l2 + l1 + l3) simplify → 5.40340856176e-8*Cy + 8.18698266934e-8*Dy - 5.25829433769e-5
Cy := 1
Dy := 1
Given
9.8243792032e-9*Cy + 8.18698266934e-8*Dy - 2.48795542412e-7 == 0
5.40340856176e-8*Cy + 8.18698266934e-8*Dy - 5.25829433769e-5 == 0
[Cy; Dy] := Find(Cy, Dy)
Cy = 1183.77
Dy = -139.014
θx(z) := (F12x*z^2 + RAx*Φ(z - l2)*(z - l2)^2 + F32'x*Φ(z - l1 - l2)*(z - l1 - l2)^2 + Cx)/(2*E_пр*Jx)
θy(z) := (F12y*z^2 + RAy*Φ(z - l2)*(z - l2)^2 + F32'y*Φ(z - l1 - l2)*(z - l1 - l2)^2 + Cy)/(2*E_пр*Jy)
wx(z) := (F12x*z^3 + RAx*Φ(z - l2)*(z - l2)^3 + F32'x*Φ(z - l1 - l2)*(z - l1 - l2)^3 + Dx + Cx*z)/(6*E_пр*Jx)
wy(z) := (F12y*z^3 + RAy*Φ(z - l2)*(z - l2)^3 + F32'y*Φ(z - l1 - l2)*(z - l1 - l2)^3 + Dy + Cy*z)/(6*E_пр*Jy)
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zmax := 0
zmax := Minimize(θx, zmax)
θxmax := θx(zmax) = -0.000298528  # меньше допустимого
θдоп := 0.005
zmax := 0
xдоп := 0.01*m1 = 2e-5
zmax := Maximize(θy, zmax)
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xдоп := 0.01*m2 = 2.5e-5
θymax := θy(zmax) = 0.000290745  # меньше допустимого
yдоп := 0.01*m1 = 2e-5
zmax := 0
yдоп := 0.01*m2 = 2.5e-5
zmax := Maximize(wx, zmax)  # Условия жесткости выполняются
wxmax := wx(zmax) = 2.39008e-5  # меньше допустимого
zmax := 0.4
zmax := Maximize(wy, zmax)
wymax := wy(zmax) = 1.63947e-5  # меньше допустимого
# 10. Выбор подшипников качения
# а) Определить радиальные нагрузки в опорах
RA := sqrt(RAx^2 + RAy^2) = 14060.1
RB := sqrt(RBx^2 + RBy^2) = 12242.5
# б) Определить приведенную нагрузку для наиболее нагруженного радиального подшипника
X := 1  # -коэффициент радиальной нагрузки
V := 1.0  # -безразмерный коэффициент вращения
Kб := 1.0  # -безразмерный коэффициент безопасности
Kт := 1.0  # -безразмерный температурный коэффициент
P := X*V*RA*Kб*Kт = 14060.1
# в) Определить долговечность подшипника
Lh := 10000
L := 6*10^-5*Lh*30*ω_IIy/π = 202.105
# д) Найти расчетную динамическую грузоподъемность подшипника
Cp := P*nthroot(L, 3) = 82511.3
# Выбрать подшипник
# Легкая серия диаметров 2, узкая серия ширин 0
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# Предусмотрены d=105÷360мм
# 11. Расчет шпонок
# а) Определить длину шпонки по условию прочности, соответствующему состоянию смятия
Mкр := Fτ12*r2 = 542.457
λ1 := sqrt(16*Mкр/(dст*σ_смIII)) = 0.0200455
h := λ1/4 = 0.00501136
# б) Определить длину шпонки по условию прочности, соответствующему состоянию среза
λ2 := sqrt(8*Mкр/(dст*τ_срIII)) = 0.0173599
b := λ2/4 = 0.00433997
# Округлить до ближайщего стандартного большее λ
λшп := 0.022
